dimension 3
units metal
read_data structure.lammps

pair_style  mlip_gtinv
pair_coeff * * mlp.lammps Ti Al

fix 3 all box/relax  aniso 0.0
run 100

write_dump all custom dump.atom id type x y z modify format line "%d %d %10.15g %10.15g %10.15g"
